"Вариант 5"
P := 10^-4
V := 10^2
"в день"
T := 12
"дней"
Sн := (V*T)/P = 12000000
Sн := 2*10^7
"Далее выполним неравенство"
Sн ≤ S
S == A^L
1.
A := 26
"Пароль состоит из малых букв"
2*10^7 ≤ 26^L
log(2*10^7)/log(26) ≤ L
(log(2) + 7*log(10))/log(26) ≤ L
log(2)/log(26) + 7*log(10)/log(26) ≤ L
log(2)/log(26) + 7*log(10)/log(26) float → 5.15983570018
L := log(2)/log(26) + 7*log(10)/log(26) float → 5.15983570018
Sн ≤ S
S := A^L = 20000000
"Неравенство выполняется"
2.
A := 52
"Если пароль состоит из больших  и маленьких букв"
2*10^7 ≤ 52^L
log(2*10^7)/log(52) ≤ L
(log(2) + 7*log(10))/log(52) ≤ L
log(2)/log(52) + 7*log(10)/log(52) ≤ L
log(2)/log(52) + 7*log(10)/log(52) float → 4.2546711944
L := log(4.32)/log(52) + 9*log(10)/log(52) float → 5.61507282754
Sн ≤ S
S := A^L = 4.32e9
"Неравенство выполняется"
